# OpenSim document version 40000
Model double_pendulum:
  gravity: 0 -9.80665 0
  credits: Ajay Seth
  publications: For testing
  length_units: meters
  force_units: N
  Ground: meshes=Unassigned
  BodySet:
    Body rod1: mass=1 [kg] mass_center=(0 0 0) inertia=(0 0 0 0 0 0) meshes=(cylinder.obj sphere.obj)
    Body rod2: mass=1 mass_center=(0 0 0) inertia=(0 0 0 0 0 0) meshes=(cylinder.obj sphere.obj)
  JointSet:
    PinJoint pin1: socket_parent_frame=ground_offset socket_child_frame=rod1_offset
      Coordinate q1: default_value=-0.7853982 range=(-1.570796 1.570796) clamped=false
      PhysicalOffsetFrame ground_offset: socket_parent=/ground translation=(0 1 0) [meters]
      PhysicalOffsetFrame rod1_offset: socket_parent=/bodyset/rod1 translation=(0 0.5 0)
    PinJoint pin2: socket_parent_frame=rod1_offset socket_child_frame=rod2_offset
      Coordinate q2: default_value=-1.047198 range=(-1.570796 1.570796) clamped=false
      PhysicalOffsetFrame rod1_offset: socket_parent=/bodyset/rod1 translation=(0 0 0)
      PhysicalOffsetFrame rod2_offset: socket_parent=/bodyset/rod2 translation=(0 0.5 0)
  ForceSet:
    CoordinateActuator Torq1: coordinate=q1 optimal_force=1
    CoordinateActuator Torq2: coordinate=q2 optimal_force=1
