# OpenSim document version 30000
InverseKinematicsTool leg39_IKTool:
  model_file: model_file: constraint_weight=20 accuracy=1e-5 marker_file=leg39_swing_short.trc report_errors=true
      output_motion_file=leg39_swing_short_ik.sto
    IKTaskSet leg39_IK:
      IKMarkerTask R.Thigh.Upper: apply=true weight=1
      IKMarkerTask R.Thigh.Front: apply=true weight=1
      IKMarkerTask R.Thigh.Rear: apply=true weight=1
      IKMarkerTask R.Shank.Upper: apply=true weight=1
      IKMarkerTask R.Shank.Front: apply=true weight=1
      IKMarkerTask R.Shank.Rear: apply=true weight=1
      IKMarkerTask R.Heel: apply=true weight=0.01
      IKMarkerTask R.Midfoot.Lat: apply=true weight=0.01
      IKMarkerTask R.Toe.Tip: apply=true weight=100
